# II .Расчёт  валов и подшипников.
# Исходные данные (из расчета зубчатой передачи):
F_t := 5338  # Н  # - окружная сила
F_R := 1966  # Н  # - радиальная сила
F_A := 826  # Н  # - осевая сила
d_1 := 68.81  # мм  # делительный диаметр шестерни
d_2 := 271.19  # мм  # - делительный диаметр колеса
T_1 := 183.654  # Нм  # - вращающий момент на быстроходном валу
T_2 := 720  # Нм  # - вращающий момент на тихоходном валу
n_1 := 970  # мин^-1  # - частота вращения быстроходного вала
n_2 := 240  # мин^-1  # - частота вращения тихоходного вала
t_Σ := 32000  # - срок службы в часах
# 1. Расчет и проектирование быстроходного вала и подшипников
# 1. Диаметр и длина  выходного конца вала
# k=7.5 для быстроходного вала, к=5.5 - для тихоходного вала
k := 7.5
d := round(k*nthroot(T_1, 3))
d = 43  # мм
d := 44
# где d - диаметр выходного конца вала, мм
# T - вращающий  момент на валу, Н м
# Длина выходного конца вала
l := 1.5*d
l = 66  # мм
d_упл := 44.
# 2. Диаметр вала под подшипники
# Полученное значение d_п необходимо согласовать с внутренним диаметром подшипника
# Принимаем
d_п := 50  # мм
# Радиус фаски подшипника
r := 1.5  # мм
# 3. Длина вала под подшипник и высота заплечика t для упора подшипника
l_п := round(1.3*d_п)
l_п = 65  # мм
t := 2.5 + r
t = 4
t := 4  # мм
# Расстояние между внутренними стенками корпуса редуктора и вращающимися деталями  а ~ (8...10)мм:
a := 10  # мм
L := 60
# 4. Диаметр вала под колесом (для насадного колеса)
d_к := d_п + 2*t
d_к = 58  # мм
# Принимаем
d_к := 58
# 5. Длина и диаметр ступицы колеса
l_ст := 1*d_к
l_ст = 58  # мм
d_ст := 1.55*d_к
d_ст = 89.9  # мм
# Вычисленные размеры необходимо округлить до стандартных
# Принимаем
l_ст := 60  # мм
d_ст := 90  # мм
# Расчетная схема вала
# б) консольная
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# Расстояние от опоры А до середины зубчатого колеса (из чертежа режуктора)
B := 20
b_1 := 50
l_1 := round(B/2 + a + b_1/2)
l_1 = 45  # мм
# B - ширина подшипника, мм
# Принимаем
l_1 := 45  # мм
# Предварительное расстояние между опорами (уточнить при компоновке редуктора)
L := round(1.75*l_1)
L = 79  # мм
# Консольная сила от муфты:
F_к := 50*sqrt(T_1)
F_к = 677.595  # Н
# Расстояние от опоры Б до консольной силы
l_к := l/2 + l_п - B/2
l_к = 88  # мм
# Реакции в опорах
R_Bx := F_t*l_1/L
R_Bx = 3040.63  # Н
R_Ax := F_t - R_Bx
R_Ax = 2297.37  # Н
# случай 1 (осевая сила F_a направлена на опору А)
R_By := (F_R*l_1 - F_A*d/2)/L
R_By = 889.848  # Н
# случай 2 (осевая сила F_a направлена от опоры А)
R_By := (F_R*l_1 + F_A*d_1/2)/L
R_By = 1479.6
R_Ay := F_R - R_By
R_Ay = 486.398  # Н
R_Bк := F_к*(L + l_к)/L
R_Bк = 1432.38  # Н
R_Aк := R_Bк - F_к
R_Aк = 754.789  # Н
# Суммарные реакции в опорах.
R_A := sqrt(R_Ax^2 + R_Ay^2) + R_Aк
R_A = 3103.08  # Н
R_B := sqrt(R_Bx^2 + R_By^2) + R_Bк
R_B = 4813.9  # Н
# Выбираем подшипники:
# - радиальные шариковые подшипники
# Вывод:
# Если шарикоподшипники не проходят, то следует подобрать конические роликовые подшипники
# - конические роликоподшипники
# -Роликовые радиально-упорные конические подшипники
№
C_r := 70.4*10^3
# Н
C_0r := 55*10^3
# Н
е := 0.43
d := 50  # мм
D := 90  # мм
B = 20  # мм
# Осевые реакции в опорах:
F_aAmin := 0.83*е*R_A
F_aAmin = 1107.49
F_aBmin := 0.83*е*R_B
F_aBmin = 1718.08
F_aB := F_aAmin + F_A
F_aB = 1933.49
F_aA := F_aAmin
F_aA = 1107.49
# Эквивалентная нагрузка
# -опора А
V := 1
F_aA/(V*R_A) = 0.3569
Y :=
    0 if F_aA/(V*R_A) ≤ е
    0.6/е otherwise
X :=
    1 if (F_aA/(V*R_A)) ≤ e
    0.4 otherwise
X = 1
Y = 0
K_б := 1.3
K_т := 1
K_E := 0.8
P_rA := (X*V*R_A + Y*F_aA)*K_б*K_т*K_E
P_rA = 3227.21
# -опора B
F_aB/(V*R_B) = 0.401647
Y :=
    0 if F_aB/(V*R_B) ≤ е
    0.6/е otherwise
X :=
    1 if (F_aB/(V*R_B)) ≤ е
    0.4 otherwise
X = 1
Y = 0
P_rB := (X*V*R_B + Y*F_aB)*K_б*K_т*K_E
P_rB = 5006.46
P_r := max(P_rA, P_rB)
P_r = 5006.46
# Ресурс подшипников в часах
a_1 := 1  # -коэффициент надежности (при вероятности безотказной работы 90 % a_1=1)
a_23 := 0.7  # - для обычных условий применения роликоподшипников конических  a_23=0,6...0,7
n := □
L_h := a_1*a_23*(C_r/P_r)^3*10^6/(60*n_1)
L_h = 33442.7  # часов
t_Σ = 32000  # часов
# Для плавающих опор:
# - цилиндрические роликовые подшипники
# ВЫВОД :
# РАСЧЕТ НА ПРОЧНОСТЬ БЫСТРОХОДНОГО ВАЛА
# ВЫВОД :
# 2. Расчет и проектирование тихоходного вала и подшипников
# 1. Диаметр и длина  выходного конца вала
# k=7.5 для быстроходного вала, к=5.5 - для тихоходного вала
k := 5.5
d = 50
d := round(d*nthroot(4.042, 3))
d = 80  # мм
# где d - диаметр выходного конца вала, мм
# T - вращающий  момент на валу, Н м
# Длина выходного конца вала
l := 1.5*d
l = 120  # мм
# 2. Диаметр вала под подшипники
d_п := 75
d_п = 75  # мм
# Полученное значение d_п необходимо согласовать с внутренним диаметром подшипника
# Принимаем
d_п = 75  # мм
# Радиус фаски подшипника
r := 2.5  # мм
# 3. Длина вала под подшипник и высота заплечика t для упора подшипника
l_п := round(1.3*d_п)
l_п = 98  # мм
t := r + 2.5
t = 5  # мм
# Расстояние между внутренними стенками корпуса редуктора и вращающимися деталями  а ~ (8...10)мм:
a := 10  # мм
# 4. Диаметр вала под колесом (для насадного колеса)
d_к := d_п + 2*t
d_к = 85  # мм
# Принимаем
d_к = 85
# 5. Длина и диаметр ступицы колеса
l_ст := 1*d_к
l_ст = 85  # мм
d_ст := 1.55*d_к
d_ст = 131.75  # мм
# Вычисленные размеры необходимо округлить до стандартных
# Принимаем
l_ст := 85  # мм
d_ст := 60  # мм
# Расчетная схема вала
# Расчетные схемы валов
# а) межопорная
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# Расстояние между опорами
L := round(B + 2*a + l_ст)
L = 125  # мм
# Расстояние от опоры А до середины зубчатого колеса (из чертежа редуктора)
l_1 := round(B/2 + a + b_1/2)
l_1 = 45  # мм
# Принимем
l_1 := 55  # мм
# Консольная сила от муфты:
F_к := 100*sqrt(T_2)
F_к = 2683.28  # Н
# Расстояние от опоры Б до консольной силы
l_к := l/2 + l_п - B/2
l_к = 148  # мм
# Реакции в опорах
R_Bx := F_t*l_1/L
R_Bx = 2348.72  # Н
R_Ax := F_t - R_Bx
R_Ax = 2989.28  # Н
R_By := (F_R*l_1 + F_A*d/2)/L
R_By = 1129.36  # Н
R_Ay := F_R - R_By
R_Ay = 836.64  # Н
R_Bк := F_к*(L + l_к)/L
R_Bк = 5860.29  # Н
R_Aк := R_Bк - F_к
R_Aк = 3177.01  # Н
# Суммарные реакции в опорах.
R_A := sqrt(R_Ax^2 + R_Ay^2) + R_Aк
R_A = 6281.16  # Н
R_B := sqrt(R_Bx^2 + R_By^2) + R_Bк
R_B = 8466.42  # Н
# Выбираем подшипники:
# - радиальные шариковые подшипники
# Вывод:
# Если шарикоподшипники не проходят, то следует подобрать конические роликовые подшипники
# - конические роликоподшипники
# -Роликовые радиально-упорные конические подшипники
№
C_r := □
# Н
C_0r := □
# Н
е := □
d := 49  # мм
D := □  # мм
B := □  # мм
# Осевые реакции в опорах:
F_aAmin := 0.83*е*R_Aт
F_aAmin =  # error: This variable is undefined.
F_aBmin := 0.83*е*R_Bт
F_aBmin =  # error
F_aB := F_aAmin + F_A
F_aB =  # error
F_aA := F_aAmin
F_aA =  # error
# Эквивалентная нагрузка
# -опора А
F_aA/(V*R_Aт) =  # error
Y :=
    0 if F_aA/(V*R_Aт) ≤ е
    0.6/е otherwise
X :=
    1 if (F_aA/(V*R_Aт)) ≤ е
    0.4 otherwise
X =  # error
Y =  # error
P_rA := (X*V*R_Aт + Y*F_aA)*K_б*K_т*K_E
P_rA =  # error
# -опора B
F_aB/(V*R_Bт) =  # error
Y :=
    0 if F_aB/(V*R_Bт) ≤ е
    0.6/е otherwise
X :=
    1 if (F_aB/(V*R_Bт)) ≤ е
    0.4 otherwise
X =  # error
Y =  # error
P_rB := (X*V*R_Bт + Y*F_aB)*K_б*K_т*K_E
P_rB =  # error
P_r := max(P_rA, P_rB)
P_r =  # error
# Ресурс подшипников в часах
a_1 := 1  # -коэффициент надежности (при вероятности безотказной работы 90 % a_1=1)
a_23 := 0.7  # - для обычных условий применения роликоподшипников конических  a_23=0,6...0,7
n := 1
L_h := a_1*a_23*(C_r/P_r)^3*10^6/(60*n)
L_h =  # error  # часов
t_Σ = 32000  # часов
# ВЫВОД :
# РАСЧЕТ НА ПРОЧНОСТЬ ТИХОХОДНОГО ВАЛА
# ВЫВОД :
# Результаты расчета зубчатой передачи
T_2 := 800  # Нм - вращающий момент на тихоходном валу
u := □
d_1 = 68.81  # мм - делительный диаметр шестерни
d_2 = 271.19  # мм - делительный диаметр колеса
T_1 := 277.81  # Нм
n_1 := 950  # мин^-1
n_2 := 320  # мин^-1
# Размеры валов и подшипников
# - быстроходный вал
# - тихоходный вал
