# ПРОЕКТИРОВАНИЕ ЦИЛИНДРИЧЕСКИХ ЗУБЧАТЫХ ПЕРЕДАЧ
# Исходные данные:
# Спроектировать  цилиндрическую косозубую однопоточную передачу внешнего зацепления
T_т := 720  # - вращающий момент на тихоходном валу, Нм
# Признак передачи sign=1 - с внешним зацеплением, sign= -1 - с внутренним
sign := 1  # - передача с внешним зацеплением
n_б := 970  # - частота вращения быстроходного вала, мин^-1
n_т := 240  # - частота вращения тихоходного вала, мин ^-1
t_Σ := 32000  # - срок службы в часах
n_ст := 7  # - степень точности передачи
NR := 1  # - типовой режим нагружения
n_w := 1  # - количество потоков в передаче
# Порядок расчета зубчатой передачи:
# 1. Энергетический и кинематический расчеты
# 1. Энергетический и кинематический  расчеты
# КПД зубчатых закрытых передач, работающих в масле h=0,96...0,98
# Принимаем
η := 0.97
# Передаточное число
u := n_б/n_т
u = 4.04167
# Вращающие моменты и частоты вращения валов
T_б := T_т/(u*η)
# Требуемая мощность двигателя
P_дв := T_б*n_б/9550  # кВт
# Исходные данные для расчета
T_1 := T_б
n_1 := n_б
T_2 := T_т
n_2 := n_т
T_1 = 183.654  # Нм
T_2 = 720  # Нм
n_1 = 970  # мин^-1
n_2 = 240  # мин^-1
# 2.  Выбор материалов колес
# 2. Выбор материала колес
# В  задании дано, например,
# шестерня выполнена из стали 35ХM т/о - закалка ТВЧ
# колесо  35ХM т/о - закалка  ТВЧ
# Из табл.1 среднее значение твердостей зубьев колес
# 1 - шестерня 35XM ТВЧ
HRC_1.min := 53
HRC_1.max := 53
# 2 - колесо 35ХM Улучш.
HRC_2.min := 48
HRC_2.max := 48
# Примечание: HB ~10 HRC
# Средние значения твердостей:
HRC_1 := (HRC_1.min + HRC_1.max)/2
HRC_1 = 53
HB_1 := 530
HRC_2 := (HRC_2.min + HRC_2.max)/2
HRC_2 = 48
HB_2 := 480
# 3.  Допускаемые напряжения (контактные и изгибные)
# 3. Допускаемые напряжения
# 3.1. Допускаемые контактные напряжения
# [σ]_H = σ_Η_lim z_N / S_H
# σ_Η_lim - предел контактной выносливости, МПà
# z_N - коэффициент долговечности,
# S_H - коэффициент запаса прочности
σ_Hlim1 := 2*HB_1 + 70
σ_Hlim1 := 17*HRC_1 + 100
σ_Hlim1 := 17*HRC_1 + 200
# Предел контактной выносливости поверхностных слоев зубьев
σ_Hlim1 := 23*HRC_1
σ_Hlim1 := 17*HRC_1 + 200
σ_Hlim1 = 1101  # МПа
σ_Hlim2 := 17*HRC_2 + 200
σ_Hlim2 = 1016  # МПа
# Число циклов, соответствующих перелому кривой усталости:
# N_HG = (HB_ср)^3
N_HG1 := HB_1^3
N_HG1 = 148877000
N_HG2 := HB_2^3
N_HG2 = 110592000
# N_K = 60 n_3 n t_Σ
# N_K - требуемый ресурс в циклах нагружения,
# n_3 - число вхождений в зацепление зубьев колес за один оборот,
# n - частота вращения,
# t_Σ - ресурс передачи
n_31 := 1  # - число вхождений в зацепление зуба шестерни за один оборот
n_32 := 1  # - число вхождений в зацепление зуба колеса за один оборот
N_K1 := 60*n_31*n_1*t_Σ
N_K1 = 1862400000
N_K2 := 60*n_32*n_2*t_Σ
N_K2 = 460800000
# N_HЕ = N_K μ_Η
# N_HЕ - эквивалентное число циклов при переменном нагружении,
# N_K - требуемый ресурс в циклах нагружения,
# μ_H - коэффициент эквивалентности по циклам
# Коэффициент , учитывающий режим работы
# (типовой режим нагружения)
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# Таблица 1
# Для заданного режима
μ_H := 0.5
# Эквивалентное число циклов с учетом режима работы
N_E1 := N_K1*μ_H
N_HE1 := N_K1*μ_H
N_HE1 = 931200000
N_HE2 := N_K2*μ_H
N_HE2 = 230400000
# Коэффициент долговечности
# Z_N - коэффициент долговечности, 1 ≤ Z_N ≤ Z_Nmax
# Z_Nmax=2,6 для материалов с однородной структурой (нормализованные, улучшенные,
# объемно закаленные), Z_Nmax=1,8 - для поверхностно упрочненных материалов;
# N_HG - число циклов, соответствующих перелому кривой усталости:,
# N_HE - эквивалентное число циклов при переменном нагружении.
Z_N1 := nthroot(N_HG1/N_HE1, 6)
Z_N1 = 0.736711
# Учитывая ограничения, принимаем:
Z_N1 := 1
Z_N2 := nthroot(N_HG2/N_HE2, 6)
Z_N2 = 0.884858
# Учитывая ограничения, принимаем:
Z_N2 := 1
# S_H - коэффициент запаса,
# S_H = S_Hmin S_Ha S_Hb
# S_Hmin - минимальный коэффициент запаса: 1,1- для зубчатых колес с однородной  структурой (нормализованных, улучшенных, объемно закаленных), 1,2 - для  зубчатых колес с поверхностным упрочнением.
# S_Ha  - коэффициент запаса: 1,13 - для передач, выход которых из строя приводит к  тяжелым последствиям, 1 - в остальных случаях.
# S_Hb - коэффициент запаса, учитывающий упрощения, S_Hb = 1.1 .. 1.2
# Принимаем, например:
S_Hmin1 := 1.2
S_Hmin2 := 1.2
S_Ha := 1  # т.к. выход из строя передачи не связан с тяжелыми последствиями
S_Hb := 1.1
S_H1 := S_Hmin1*S_Ha*S_Hb
S_H1 = 1.32
S_H2 := S_Hmin2*S_Ha*S_Hb
S_H2 = 1.32
[σ]_H1 := σ_Hlim1*Z_N1/S_H1
[σ]_H1 = 834.091  # МПа
[σ]_H2 := σ_Hlim2*Z_N2/S_H2
[σ]_H2 = 769.697  # МПа
# Для прямозубых передач
[σ]_H := min([σ]_H1, [σ]_H2)
# Для косозубых передач:
[σ]_H := 0.5*([σ]_H1 + [σ]_H2)
[σ]_H = 801.894  # МПа
[σ]_H2 ≤ [σ]_H ≤ 1.25*[σ]_H2 = 1
770 ≤ 802 ≤ 1.25*770
Принимаем
[σ]_H := 802  # МПа
# 3.2. Допускаемые напряжения изгиба
# [σ]_F = σ_Flim Y_N / S_F
# σ_F_lim - предел выносливости при "отнулевом" цикле нагружений, МПа
# Y_N - коэффициент долговечности,
# S_F - коэффициент запаса прочности
# Предел изгибной выносливости
σ_Flim1 := 700  # МПа
σ_Flim2 := 500
σ_Flim2 = 500  # МПа
# Y_N == nthroot(4*10^6/N_FE, m_F)
#
# Y_N - коэффициент долговечности 1 ≤ Y_N ≤ Y_Nmax,
# m_F - показатель степени кривой усталости, m_F=6- для нормализованных и  улучшенных зубчатых колес; m_F=9 - для закаленных и поверхностно упрочненных.
# Y_Nmax=4 при m_F=6 и  Y_Nmax=2,6 при m_F=9.
# N_FE - эквивалентное число циклов при переменном нагружении
# Принимаем
m_F1 := 9
m_F2 := 9
# N_FE = N_K μ_F
# N_FE - эквивалентное число циклов при переменном нагружении
# N_K - требуемое число циклов нагружения,
# μ_F - коэффициент эквивалентности по циклам
# Требуемое число циклов (расчетное):
# Таблица 2
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# Из табл.2, принимем:
μ_F1 := 0.2
μ_F2 := 0.2
N_FE1 := N_K1*μ_F1
N_FE1 = 372480000
N_FE2 := N_K2*μ_F2
N_FE2 = 92160000
Y_Nmax := 2.6
Y_N1 := nthroot(4*10^6/N_FE1, m_F1)
Y_N1 = 0.604251
# Учитывая ограничения, принимаем:
Y_N1 := 1
Y_N2 := nthroot(4*10^6/N_FE2, m_F2)
Y_N2 = 0.705689
# Учитывая ограничения, принимаем:
Y_N2 := 1
# Коэффициент запаса
#
# S_F = S_Fmin S_Fa S_Fb
# S_Fmin - минимальный коэффициент запаса, принимают равным 1,7. Для нитроцементованных зубчатых колес S_Fmin=1,55, а для цементованных - S_Fmin=1,65.
# S_Fa - коэффициент запаса, учитывающий последствия при выходе из строя передачи.
# S_Fb - коэффициент запаса, учитывающий упрощения, S_Hb = 1.1 .. 1.3
S_Fmin := 1.7
S_Fa := 1  # т.к. выход из строя передачи не связан с тяжелыми последствиями
S_Fb := 1.3
S_F1 := S_Fmin*S_Fa*S_Fb
S_F1 = 2.21
S_F2 := S_Fmin*S_Fa*S_Fb
S_F2 = 2.21
[σ]_F1 := σ_Flim1*Y_N1/S_F1
[σ]_F1 = 316.742  # МПа
[σ]_F2 := σ_Flim2*Y_N2/S_F2
[σ]_F2 = 226.244  # МПа
# 4.  Коэффициенты нагрузки
# 4. Коэффициенты нагрузки
# K_H = K_HV K_H_β K_H_α
# K_H - коэффициент нагрузки в расчетах на контактную выносливость,
# K_HV - коэффициент, учитывающий внутреннюю динамическую нагрузку,
# K_Hb - коэффициент, учитывающий неравномерность распределения нагрузки,
# K_H_α - коэффициент, учитывающий погрешность изготовления
# K_F = K_FV K_F_β K_F_α
# K_F - коэффициент нагрузки в расчетах на изгибную выносливость,
# K_FV - коэффициент, учитывающий внутреннюю динамическую нагрузку,
# K_F_β - коэффициент, учитывающий неравномерность распределения нагрузки,
# K_F_α - коэффициент, учитывающий погрешность изготовления
# 4.1.Коэффициент , учитывающий внутреннюю динамическую нагрузку K_HV, K_FV
# 4.1.1.Предварительное значение межосевого расстояния:
# Коэффициент  К_А зависит от типа передачи: K _А  =  450 - для прямозубых передач,  K _А  =  410  - для косозубых передач
K_А := 410
a_w1 := K_А*(u + sign*1)*nthroot(1.3*T_1/(0.315*u*[σ]_H^2), 3)
# Т_1 - вращающий момент на шестерне, Нм
# u - передаточное число
a_w1 = 137.067  # мм
# 4.1.2. Окружная скорость колес
V_ok := 2*π*a_w1*n_1/(60000*(u + sign*1))
V_ok = 2.76159  # м/с
# 4.1.3. Коэффициенты, учитывающие влияние вида зубчатой передачи и модификации профиля головки зуба при расчете на контактную и изгибную прочность
β := 1
δ_H :=
    0.02 if HB_2 ≤ 350
    0.014 otherwise
δ_F :=
    0.06 if β > 0
    0.16 otherwise
# 4.1.4. Коэффициент, учитывающий влияние разности шагов зацепления зубьев шестерни и колеса
δ_0 := 0.1633*n_ст^1.74
δ_0 = 4.82455
δ_H = 0.014
# 4.1.5. Удельная окружная динамическая сила
w_Hvv := δ_H*δ_0*V_ok*sqrt(a_w1/u)
w_Hvv = 1.08625  # Н/мм
w_Fv := δ_F*δ_0*V_ok*sqrt(a_w1/u)
w_Fv = 4.65536  # Н/мм
# 4.1.6. Предварительное значение окружной силы
F_t := T_1*10^3*(u + sign*1)/a_w1
F_t = 6755.26  # Н
# 4.1.7. Предельные значения удельной окружной динамической силы
w_Hvпред := (4*n_ст - 15) + 0.1*n_ст^0.4
w_Hvпред = 13.2178  # Н/мм
w_Hv :=
    w_Hvпред if w_Hvv > w_Hvпред
    w_Hvv otherwise
w_Hv = 1.08625  # Н/мм
# 4.1.8. Предварительная ширина зубчатого венца колеса
b_w := 0.315*a_w1
b_w = 43.1761  # мм
K_Hv := 1 + w_Hv*b_w/F_t
K_Fv := 1 + w_Fv*b_w/F_t
K_Hv = 1.00694
K_Fv = 1.02975
# 4.2. Коэффициент , учитывающий неравномерность распределения нагрузки по длине контактных линий зависит от относительной ширины колес и их твердости
# Коэффициент ширины колеса y_ba = b/a_w рекомендуется принимать в зависимости от положения зубчатых колес относительно опор:
# - при симметричном положении  y_ba =0,315...0,5;
# - при несимметричном положении  y_ba =0,25...0,4;
# - при консольном положении одного или обоих колес  y_ba =0,2...0,25
схем := 1  # схема передачи по табл.3
Принимаем
ψ_ba := 0.25
ψ_bd := 0.5*ψ_ba*(u + sign*1)
ψ_bd = 0.630208
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# Таблица 3
# Схемы цилиндрических передач
K_Hβ :=
    (1 + 0.51*ψ_bd/схем) if HB_2 ≤ 350
    (1 + 1.1*(ψ_bd/схем)) otherwise
K_Fβ :=
    (1 + 0.25*(ψ_bd/схем)) if HB_2 ≤ 350
    (1 + 1.8*(ψ_bd/схем)) otherwise
K_Hβ = 1.69323
K_Fβ = 2.13438
# 4.3. Коэффициент, учитывающий распределение нагрузки между зубьями a(для прямозубых колес a=0; для косозубых колес a=0,12 для закаленных сталей,  a=0,06 - для улучшенных сталей)
# Принимаем :
α := 0.12
K_Hα := 1 + α*(n_ст - 5)
K_Hα = 1.24
K_Fα := K_Hα
K_H := K_Hv*K_Hβ*K_Hα
K_F := K_Fv*K_Fβ*K_Fα
K_H = 2.11418
K_F = 2.72537
# 5.  Межосевое расстояние (из условия контактной прочности)
# 5. Межосевое расстояние
a_w := K_А*(u + sign*1)*nthroot(K_H*T_1/(ψ_ba*u*[σ]_H^2), 3)
a_w = 174.096  # мм
# Принимаем по ряду нормальных размеров
a_w := 170  # мм
# 6.  Ширина зубчатых венцов колес
# 6. Ширина зубчатых венцов колес
# колеса
b_2 := ψ_ba*a_w
b_2 = 42.5
# Принимаем по ряду нормальных размеров
b_2 := 45  # мм
# шестерни
b_1 := b_2 + 5
b_1 = 50  # мм
# 7.  Нормальный модуль (из условия изгибной прочности)
# 7. Нормальный модуль m
# m_min = K_m K_F T_1 (u + 1) / (a_w b_2 [σ]_F2)
# m_min - минимальный модуль, определяемый из условия изгибной прочности, мм
# K_m - коэффициент, учитывющий вид зубчатой передачи, равный 3,4^.10^3  для  прямозубых передач и 2,8^.10^3 - для косозубых передач
# K_F - коэффициент нагрузки
K_m := 2.8*10^3  # т.к. зубчатая передача - .косозубая............
m_min := K_m*K_F*T_1*(u + sign*1)/(a_w*b_2*[σ]_F2)
m_min = 4.08244  # мм
# m_max = 2 a_w / (17 (u + 1))
# m_max - максимальный модудь, определяемый из условия неподрезания зубьев, мм
# a_w - межосевое расстояние, мм
# u - передаточное число
m_max := 2*a_w/(17*(u + sign*1))
m_min ≤ m ≤ m_max
m_max = 3.96694  # мм
# Ряд стандартных модулей
# 1-й ряд - 1; 1,25; 1,5; 2; 2,5; 3; 4; 5; 6; 8; 10
# 2-й ряд - 1,12; 1,37; 1,75; 2,25; 2,75; 3,5; 4,5;5,5; 7; 9
# Принимаем  значение модуля из стандартного ряда:
m := 4  # мм,  с последующей проверкой на изгибную прочность
# 8.  Числа зубьев колес
# 8. Числа зубьев колес
# 8.1. Суммарное число зубьев
# Минимальный угол наклона зубьев в градусах:
# для косозубых колес βmin=8^0;
# для шевронных  βmin=25^0
# Для косозубых колес внутреннего зацепления β=15^0
β_min := 8*π/180  # -минимальный  угол наклона в радианах
Z_s := 2*a_w*cos(β_min)/m  # - суммарное число зубьев колес
Z_s = 84.1728
# Принимаем
Z_s := 84
# Уточняем угол наклона зубьев:
β := acos(Z_s*m/(2*a_w)) = 0.153544
βg := β*180/π  # -угол наклона зубьев в градусах
βg = 8.79741
# 8.2. Число зубьев шестерни
Z_1 := Z_s/(u + sign*1)
Z_1 = 16.6612
# Принимаем
Z_1 := 17
# 8.3. Число зубьев колеса
Z_2 := Z_s - sign*Z_1
Z_2 = 67
# 8.4. Фактическое передаточное число Uфакт  и ошибка в %
U_факт := Z_2/Z_1
U_факт = 3.94118
Δ_u := |(U_факт - u)/u|*100
Δ_u = 2.48636  # % ,  должно быть меньше [Δ_u]
[Δ_u] := 5  # %
# 9.  Проверочный расчет на контактную выносливость
# 9. Проверочный расчет на контактную выносливость
# σ_H == (Z_σ/a_w*sqrt(K_H*T_1*(u + sign)^3/(b_2*U_факт)) ≤ [σ]_H)
# Z_σ -коэффициент, учитывающий вид зубчатой передачи
# ( 9600 - для прямозубых и 8400 - для косозубых передач)
Z_σ := 8400
σ_Hр := Z_σ*sqrt(K_H*T_1*(U_факт + sign*1)^3/(b_2*U_факт))/a_w
σ_Hр = 803.023
# МПа , что меньше допустимого
[σ]_H = 802  # МПа
Δ_σ := (σ_Hр - [σ]_H)*100/[σ]_H
Δ_σ = 0.127548  # %
# Если расчетное напряжение s_Н меньше допустимого  [s_Н] в пределах 15...20% или s_Н больше [s_Н] в пределах 5%, то ранее принятые параметры передачи принимают за окончательные, В противном случае необходим пересчет.
# 10.Проверочный расчет на изгибную выносливость
# 10. Проверочный расчет на изгибную выносливость
# σ_F == (F_t*K_F/(m*b_2)*Y_σ ≤ [σ]_F)
# σ_F - напряжение изгиба в опасном сечении зуба, МПа,
# [σ]_F - допускаемое напряжение изгиба, МПа,
# F_t - окружная сила, Н
# K_F - коэффициент нагрузки,
# m - нормальный модуль, мм,
# b_2 - ширина зубчатого венца, мм,
# Y_σ - коэффициент перекрытия и наклона зубьев
# Окружная сила
F_t := 10^3*T_1*(u + sign*1)/a_w
F_t = 5446.6  # Н
# Y_σ == Y_FS*Y_β*Y_ε
# Y_FS - коэффициет, учитывающий форму зуба и концентрацию напряжений;
# Y_β - коэффициент, учитывающий наклон зуба,
# Y_ε - коэффициент, учитывающий перекрытие зубьев. Для косозубых передач  принимается  равным 0,65, для прямозубых - 0,8.
# Приведенное число зубьев: Z_V = Z / (cos ^3 β)
Z_V1 := Z_1/cos(β)^3
Z_V1 = 17.6144
Z_V2 := Z_2/cos(β)^3
Z_V2 = 69.4215
# Коэффициент формы зуба и концентрации напряжений:
# Y_FS = f(Z_V , x),
# x - коэффициент смещения
Принимаем
x_1 := 0
x_2 := 0
Y_FS1 := 3.47 + 13.2/Z_V1 - 29.7*x_1/Z_V1 + 0.092*x_1^2
Y_FS1 = 4.21939
Y_FS2 :=
    (3.47 + 13.2/Z_V2 - 29.7*x_1/Z_V2 + 0.092*x_1^2) if sign ≥ 1
    9*10^-5*Z_V2^2 - 0.0185*Z_V2 + 4.6009 otherwise
Y_FS2 = 3.66014
# Коэффициент, учитывающий наклон зуба:
# Y_β = 1 - β^ο / 100 >0.7
βg = 8.79741
Y_β := 1 - βg/100
Y_β = 0.912026
# Коэффициент, учитывающий перекрытие зубьев Yε (для прямозубых передач  Yε = 0,8; для косозубых Yε = 0,65)
Y_ε := 0.65
Y_σ1 := Y_FS1*Y_β*Y_ε
Y_σ1 = 2.50132
Y_σ2 := Y_FS2*Y_β*Y_ε
Y_σ2 = 2.16979
# Напряжения изгиба в опасном сечении на переходной поверхности зубьев:
# шестерни
σ_F1 := F_t*K_F/(m*b_2)*Y_σ1
σ_F1 = 206.276  # МПа  # ,что должно быть  меньше допускаемых
[σ]_F1 = 316.742  # МПа
# колеса
σ_F2 := F_t*K_F/(m*b_2)*Y_σ2
σ_F2 = 178.936  # МПа  # ,что должно быть  меньше допускаемых
[σ]_F2 = 226.244  # МПа
# 11.Геометрические параметры передачи
# 11. Геометрические параметры передачи
# 11.1 Делительные диаметры
d_1 := m*Z_1/cos(β)
d_1 = 68.8095  # мм  # - делительный диаметр шестерни
d_2 := m*Z_2/cos(β)
d_2 = 271.19  # мм  # - делительный диаметр колеса
# 11.2 Диаметры вершин
d_a1 := d_1 + 2*m
d_a1 = 76.8095  # мм  # - диаметр вершин шестерни
d_a2 := d_2 + sign*2*m
d_a2 = 279.19  # мм  # - диаметр вершин колеса
# 11.3 Диаметры впадин
d_f1 := d_1 - 2.5*m
d_f1 = 58.8095  # мм  # - диаметр впадин шестерни
d_f2 :=
    (d_2 - 2.5*m) if sign ≥ 1
    (2*a_w + d_a1 + 0.5*m) otherwise
m = 4
d_f2 = 261.19  # мм  # - диаметр впадин колеса
# 12.Силы в зацеплении
# 12. Силы в зацеплении
# Окружная сила:
F_t := 2*10^3*T_1/d_1
F_t = 5338.04  # Н
# Осевая сила:
# Радиальная сила:
F_A := F_t*tan(β)
F_A = 826.125  # Н
F_R := F_t*tan(20*π/180)/cos(β)
F_R = 1966.02  # Н
# Далее выполняется проектирование валов и подшипниковых узлов
